*Heading
** Job name: C1M1_H0002-NP Model name: C1M1_H0002-NP
** Generated by: Abaqus/CAE 2020
*Preprint, echo=NO, model=NO, history=NO, contact=NO
** ----------------------------------------------------------------
**
** PART INSTANCE: Part-1-1
**
*Node
      1, 0.000449999992,           0.
      2, 0.000449999992, 0.000416000024
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*Element, type=CPS4R
 1,   1,  37, 325,  50
 2,  37,  38, 326, 325
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*Nset, nset=Part-1-1_elasticity
   1,   2,   6,   7,   9,  10
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*Elset, elset=Part-1-1_elasticity
  41,  42,  43,  44,  45,  46
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*Nset, nset=Part-1-1_plasticity
   1,   2,   3,   4,   5,   6
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*Elset, elset=Part-1-1_plasticity
   1,   2,   3,   4,   5,   6
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*System
*Nset, nset=bottom
   1,   4,   9,  17,  24,  25
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*Nset, nset=left
   3,   4,   5,   8,  12,  13
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*Nset, nset=right
  25,  26,  29,  30,  33,  36
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*Nset, nset=top
   7,   8,  16,  22,  27,  30
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**
** MATERIALS
**
*Material, name=Al
*Elastic
26300., 0.33
*Material, name=SiC
*Elastic
192300., 0.17
