*Heading
** Job name: c1m1_H0002 Model name: C1M1_H0002
** Generated by: Abaqus/CAE 2020
*Preprint, echo=NO, model=NO, history=NO, contact=NO
** ----------------------------------------------------------------
**
** PART INSTANCE: C1M1-1
**
*Node
      1,           0., 0.00141499995,           0.
      2, 0.000415999995, 0.00141499995,           0.
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*Element, type=S4RT
1,   1,  37, 301,  44
2,  37,  38, 302, 301
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*Nset, nset=C1M1-1_BL-Elasticity
   3,   4,   7,  10,  13,  14
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*Elset, elset=C1M1-1_BL-Elasticity
 551, 552, 553, 554, 555, 556
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*Nset, nset=C1M1-1_BL-Plasticity
   1,   2,   3,   4,   5,   6
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*Elset, elset=C1M1-1_BL-Plasticity
   1,   2,   3,   4,   5,   6
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*Nset, nset=C1M1-1_bottom
  16,  18,  25,  29,  35,  36
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*Nset, nset=C1M1-1_PB_left
  36, 297, 296, 295,  13, 110
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*Nset, nset=C1M1-1_PB_right
  35, 292, 293, 294,  32, 276
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*Nset, nset=C1M1-1_top
   6,   7,  12,  21,  33,  34
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*Nset, nset=dislo_left
   13,  110,  8,  83,  82,  81,  80,  79,  78,  77,   1,  44,   4
*Nset, nset=dislo_right
   32,  276,  28, 216, 217, 218, 219, 220, 221, 222, 23, 182,  24
*System
**
** MATERIALS
**
*Material, name=Al
*Elastic
26300., 0.33
*Material, name=SiC
*Elastic
192300., 0.17
