*Heading
** Job name: c1m1_H0002_remesh Model name: C1M1_H0002_remesh
** Generated by: Abaqus/CAE 2020
*Preprint, echo=NO, model=NO, history=NO, contact=NO
** ----------------------------------------------------------------
**
** PART INSTANCE: C1M1-1
**
*Node
      1,           0., 0.00141499995,           0.
      2, 0.000415999995, 0.00141499995,           0.
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*Element, type=S4RT
 1,   1,  37, 625,  54
 2,  37,  38, 626, 625
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*Nset, nset=C1M1-1_block-pla
    1,    2,    3,    4,    5,    6
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*Elset, elset=C1M1-1_block-pla
    1,    2,    3,    4,    5,    6
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*Nset, nset=C1M1-1_block-ela
    3,    4,    7,   10,   13,   14
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*Elset, elset=C1M1-1_block-ela
 2157, 2158, 2159, 2160, 2161, 2162
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*Nset, nset=C1M1-1_PB_left
   1,   4,   8,  13,  33,  36
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*Nset, nset=C1M1-1_PB_right
  23,  24,  28,  32,  34,  35
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*Nset, nset=C1M1-1_bottom
  16,  18,  25,  29,  35,  36
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*Nset, nset=C1M1-1_top
   6,   7,  12,  21,  33,  34
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*System
**
** MATERIALS
**
*Material, name=Al
*Elastic
26300., 0.33
*Material, name=SiC
*Elastic
192300., 0.17
