*Heading
** Job name: c1m1_H0002_remesh Model name: C1M1_H0002_remesh
** Generated by: Abaqus/CAE 2020
*Preprint, echo=NO, model=NO, history=NO, contact=NO
** ----------------------------------------------------------------
**
** PART INSTANCE: C1M1-1
**
*Node
      1,           0., 0.00141499995,           0.
      2, 0.000415999995, 0.00141499995,           0.
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*Element, type=S4RT
 1,   1,  37, 625,  54
 2,  37,  38, 626, 625
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*Nset, nset=C1M1-1_Set-BL0
    1,    2,    3,    4,    5,    6
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*Elset, elset=C1M1-1_Set-BL0
    1,    2,    3,    4,    5,    6
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*Nset, nset=C1M1-1_Set-BL1
   13,   14,   18,   36,  202,  203
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*Elset, elset=C1M1-1_Set-BL1, generate
 2884,  2947,     1
*Nset, nset=C1M1-1_Set-BL2
   29,   30,   32,   35,  483,  484
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*Elset, elset=C1M1-1_Set-BL2, generate
 2413,  2476,     1
*Nset, nset=C1M1-1_Set-BL3
   20,   21,   24,   34,  327,  328
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*Elset, elset=C1M1-1_Set-BL3, generate
 2285,  2348,     1
*Nset, nset=C1M1-1_Set-BL4
    3,    4,    7,   33,   46,   47
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*Elset, elset=C1M1-1_Set-BL4, generate
 2157,  2220,     1
*Nset, nset=C1M1-1_Set-BL5
   10,   15,   19,   31,  228,  229
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*Elset, elset=C1M1-1_Set-BL5, generate
 2948,  3236,     1
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*System
**
** MATERIALS
**
*Material, name=Al
*Elastic
26300., 0.33
*Material, name=SiC
*Elastic
192300., 0.17
