*Heading
** Job name: C1M2-H0002-NP Model name: C1M2-NP
** Generated by: Abaqus/CAE 2020
*Preprint, echo=NO, model=NO, history=NO, contact=NO
**
** PARTS
**
*Part, name=Part-1
*Node
      1, 0.000499000016, 0.000410500012
      2,           0., 0.000410500012
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*Element, type=CPS4R
 1,   1,  37, 313,  50
 2,  37,  38, 314, 313
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*Element, type=CPE4R
611,   1,  50, 708,  57
612,  50,  49, 709, 708
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*Nset, nset=elasticity
   1,   4,   5,   6,   7,   9
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*Elset, elset=elasticity
  21,  22,  23,  24,  25,  26
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*Nset, nset=plasticity
   1,   2,   3,   4,   5,   6
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*Elset, elset=plasticity
   1,   2,   3,   4,   5,   6
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*Nset, nset=bottom
   3,   4,  20,  21,  35,  36
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*Nset, nset=left
   2,   3,   8,  10,  11,  14
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*Nset, nset=right
  16,  17,  26,  31,  32,  36
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*Nset, nset=top
  13,  14,  25,  29,  32,  34
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*End Part
**
**
** ASSEMBLY
**
*Assembly, name=Assembly
**
*Instance, name=Part-1-1, part=Part-1
*End Instance
**
*End Assembly
**
** MATERIALS
**
*Material, name=al
*Material, name=sic
