*Heading
** Job name: c1m2_H0002_unloading_umat Model name: c1m2_H0002
** Generated by: Abaqus/CAE 2020
*Preprint, echo=NO, model=NO, history=NO, contact=NO
** ----------------------------------------------------------------
**
** PART INSTANCE: Part-1-1
**
*Node
      1, 0.00173200003, 0.000587999995
      2, 0.00202600006, 0.000587999995
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*Element, type=CPE4R
 1,   1,  46, 594,  65
 2,  46,  47, 595, 594
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*Nset, nset=Part-1-1_Mat_AL
    2,    3,    5,    6,    7,    9
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*Elset, elset=Part-1-1_Mat_AL
  121,  122,  123,  124,  125,  126
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*Nset, nset=Part-1-1_Mat_SiC
    1,    2,    3,    4,    5,    6
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*Elset, elset=Part-1-1_Mat_SiC
    1,    2,    3,    4,    5,    6
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*Elset, elset=Part-1-1_block2, generate
 1858,  1907,     1
*Elset, elset=Part-1-1_block3, generate
 1808,  1857,     1
*Elset, elset=Part-1-1_block4, generate
 1758,  1807,     1
*Elset, elset=Part-1-1_block5, generate
 1908,  1957,     1
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*Nset, nset=Part-1-1_bottom
  29,  30,  32,  37,  41,  43
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*Nset, nset=Part-1-1_cpoint
 4,
*Nset, nset=Part-1-1_left
  21,  22,  24,  44,  45, 268
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*Nset, nset=Part-1-1_right
  35,  36,  39,  42,  43, 460
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*Nset, nset=Part-1-1_top
  25,  26,  28,  31,  34,  42
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** Section: SiC
*Solid Section, elset=Part-1-1_Mat_SiC, material=SiC
,
** Section: Al
*Solid Section, elset=Part-1-1_Mat_AL, material=Al
,
*System
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**
** MATERIALS
**
*Material, name=Al
*Elastic
27900., 0.33
*Material, name=SiC
*Elastic
192000., 0.17
**
** BOUNDARY CONDITIONS
**
** Name: BC-Fixed_bottom Type: Symmetry/Antisymmetry/Encastre
*Boundary
Part-1-1_bottom, ENCASTRE
** ----------------------------------------------------------------
**
** STEP: Top_disp
**
*Step, name=Top_disp, nlgeom=YES
Applied an unloading displacement on the top boundary
*Static
0.02, 0.116, 1.16e-06, 0.116
**
** BOUNDARY CONDITIONS
**
** Name: BC-Top_disp Type: Displacement/Rotation
*Boundary
Part-1-1_top, 1, 1, 1.16e-05
Part-1-1_top, 2, 2
Part-1-1_top, 6, 6
**
** OUTPUT REQUESTS
**
*Restart, write, frequency=0
**
** FIELD OUTPUT: F-Output-1
**
*Output, field, variable=PRESELECT
**
** HISTORY OUTPUT: H-Output-1
**
*Output, history, variable=PRESELECT
*End Step
** ----------------------------------------------------------------
**
** STEP: Top_disp_reverse
**
*Step, name=Top_disp_reverse, nlgeom=YES
*Static
0.02, 0.116, 1.16e-06, 0.116
**
** BOUNDARY CONDITIONS
**
** Name: BC-Top_disp Type: Displacement/Rotation
*Boundary
Part-1-1_top, 1, 1, -1.16e-05
**
** OUTPUT REQUESTS
**
*Restart, write, frequency=0
**
** FIELD OUTPUT: F-Output-1
**
*Output, field, variable=PRESELECT
**
** HISTORY OUTPUT: H-Output-1
**
*Output, history, variable=PRESELECT
*End Step
